*Heading
** Job name: exm-1 Model name: Model-1
** Generated by: Abaqus/CAE 6.14-1
*Preprint, echo=NO, model=NO, history=NO, contact=NO
**
** PARTS
**
*Part, name=Part-1
*Node
      1,        227.5,          50.
      2,        227.5,           0.
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*USER ELEMENT, TYPE=U6666, NODES=4, COORDINATES=2, PROPERTIES=6, VARIABLES=4
1,2,11
*ELEMENT, type=U6666, elset=ph-elem
   1,  9125,    29,    30,  9169
   2,  9169,  9152,   543,  9125
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*UEL PROPERTY, ELSET=ph-elem
20000, 0.2, 100.0, 0.113, 2.4, 2.5
*End Part
**
**
** ASSEMBLY
**
*Assembly, name=Assembly
**
*Instance, name=Part-1-1, part=Part-1
*End Instance
**
*Nset, nset=Set-1, instance=Part-1-1
 10,
*Nset, nset=Set-2, instance=Part-1-1
 3,
*Nset, nset=Set-3, instance=Part-1-1
 5,
*End Assembly
**
** BOUNDARY CONDITIONS
**
** Name: BC-1 Type: Displacement/Rotation
*Boundary
Set-1, 1, 1
Set-1, 2, 2
** Name: BC-2 Type: Displacement/Rotation
*Boundary
Set-2, 2, 2
*Boundary
Set-3, 11, 11
** ----------------------------------------------------------------
**
** STEP: Step-1
**
*Step, name=Step-1, nlgeom=NO, extrapolation=NO, inc=200000
*Static, direct
0.02, 1
**
** BOUNDARY CONDITIONS
**
** Name: BC-3 Type: Displacement/Rotation
*Boundary
Set-3, 2, 2, -1.
**
** CONTROLS
**
*Controls, reset
*Controls, parameters=time incrementation
1000, 1000, , 1000, 1000, , , 10, , ,
**
** SOLVER CONTROLS
**
*Solver Controls, reset
*Solver Controls
,
** OUTPUT REQUESTS
**
*Restart, write, frequency=0
**
** FIELD OUTPUT: F-Output-1
**
*Output, field, variable=PRESELECT
**
** HISTORY OUTPUT: H-Output-1
**
*Output, history, variable=PRESELECT
*End Step
